# OpenSim document version 30505
Model model_:
  BodySet:
    Body body1: mass=1 [kg] mass_center=(0 0 0) inertia=(0.3335583 0.00045 0.3335583 0 0 0)
      geometry: Cylinder body1_cylinder: scale_factors=(1 1 1) radius=0.03 half_height=0.5
        connectors: frame=../
    Body body2: mass=1 mass_center=(0 0 0) inertia=(0.3335583 0.00045 0.3335583 0 0 0)
      geometry: Cylinder body2_cylinder: scale_factors=(1 1 1) radius=0.03 half_height=0.5
        connectors: frame=../
    Body body3: mass=1 mass_center=(0 0 0) inertia=(0.3335583 0.00045 0.3335583 0 0 0)
      geometry: Cylinder body3_cylinder: scale_factors=(1 1 1) radius=0.03 half_height=0.5
        connectors: frame=../
  JointSet:
    PinJoint ground_body1:
      connectors: parent_frame=ground_offset child_frame=body1_offset
      Coordinate ground_body1_coord_0: default_value=0
      PhysicalOffsetFrame ground_offset: translation=(0 0 0)
        connectors: parent=ground
      PhysicalOffsetFrame body1_offset: translation=(0 -0.5 0)
        connectors: parent=body1
    PinJoint body1_body2:
      connectors: parent_frame=ground_offset child_frame=body2_offset
      Coordinate body1_body2_coord_0: default_value=0
      PhysicalOffsetFrame ground_offset: translation=(1 0 0)
        connectors: parent=ground
      PhysicalOffsetFrame body2_offset: translation=(0 -0.5 0)
        connectors: parent=body2
    FreeJoint body1_body3:
      connectors: parent_frame=ground_offset child_frame=body3_offset
      Coordinate body1_body3_coord_0
      Coordinate body1_body3_coord_1
      Coordinate body1_body3_coord_2
      Coordinate body1_body3_coord_3
      Coordinate body1_body3_coord_4
      Coordinate body1_body3_coord_5
      PhysicalOffsetFrame ground_offset: translation=(0 0 0)
        connectors: parent=ground
      PhysicalOffsetFrame body3_offset: translation=(0 -0.5 0)
        connectors: parent=body3
  ConstraintSet:
    PointConstraint pointconstraint_: location_body_1=(0 0.5 0) location_body_2=(0 -0.5 0)
      connectors: body_1=body1 body_2=body3
    PointConstraint pointconstraint_: location_body_1=(0 0.5 0) location_body_2=(0 0.5 0)
      connectors: body_1=body2 body_2=body3
