# OpenSim document version 30000
Model Gait2354_scaled_tibia_l:
  length_units: meters
  force_units: N
  gravity: 0 -9.80665 0
  credits:
    Delp S.L., Loan J.P., Hoy M.G., Zajac F.E., Topp E.L., Rosen J.M., Thelen D.G., Anderson F.C., Seth A. Notes: 3D, 23 DOF gait model created by D.G. Thelen, Univ. of Wisconsin-Madison, and Ajay Seth, Frank C. Anderson, and Scott L. Delp, Stanford University. Lower extremity joint defintions based on Delp et al. (1990). Low back joint and anthropometry based on Anderson and Pandy (1999, 2001). Planar knee model of Yamaguchi and Zajac (1989). Seth replaced tibia translation constraints with a CustomJoint for the knee and removed the patella to eliminate all kinematic constraints; insertions of the quadrucepts are handled with moving points in the tibia frame as defined by Delp 1990. Number of muscles was reduced by Anderson to improve simulation speed for demonstrations and is not intended to be used in research. License: Creative Commons (CCBY 3.0). You are free to distribute, remix, tweak, and build upon this work, even commercially, as long as you credit us for the original creation. http://creativecommons.org/licenses/by/3.0/ More Information: http://simtk-confluence.stanford.edu:8080/display/OpenSim/Gait+2392+and+2354+Models
  publications:
    Delp, S.L., Loan, J.P., Hoy, M.G., Zajac, F.E., Topp E.L., Rosen, J.M.: An interactive graphics-based model of the lower extremity to study orthopaedic surgical procedures, IEEE Transactions on Biomedical Engineering, vol. 37, pp. 757-767, 1990. Yamaguchi G.T., Zajac F.E.: A planar model of the knee joint to characterize the knee extensor mechanism." J . Biomech. vol. 22. pp. 1-10. 1989. Anderson F.C., Pandy M.G.: A dynamic optimization solution for vertical jumping in three dimensions. Computer Methods in Biomechanics and Biomedical Engineering 2:201-231, 1999. Anderson F.C., Pandy M.G.: Dynamic optimization of human walking. Journal of Biomechanical Engineering 123:381-390, 2001.
  BodySet:
    Body ground: mass=0 mass_center=(0 0 0) inertia_xx=0 inertia_yy=0 inertia_zz=0
    Body tibia_l: mass=3.581001 mass_center=(0 -0.184557 0) inertia_xx=0.04756937 inertia_yy=0.004813567
        inertia_zz=0.04823005 meshes=(l_tibia.vtp l_fibula.vtp)
      CustomJoint ground_tibia: parent_body=ground location_in_parent=(0 0 0) location=(0 0 0)
        Coordinate tibia_tilt: motion_type=rotational default_value=0 range=(-1.570796 1.570796) clamped=false
        Coordinate tibia_list: motion_type=rotational default_value=0 range=(-1.570796 1.570796) clamped=false
        Coordinate tibia_rotation: motion_type=rotational default_value=0 range=(-1.570796 1.570796) clamped=false
        Coordinate tibia_tx: motion_type=translational default_value=0 range=(-5 5) clamped=false
        Coordinate tibia_ty: motion_type=translational default_value=0 range=(-1 2) clamped=false
        Coordinate tibia_tz: motion_type=translational default_value=0 range=(-3 3) clamped=false
        SpatialTransform:
          TransformAxis rotation1: coordinates=tibia_tilt axis=(0 0 1) LinearFunction(coefficients=1 0)
          TransformAxis rotation2: coordinates=tibia_list axis=(1 0 0) LinearFunction(coefficients=1 0)
          TransformAxis rotation3: coordinates=tibia_rotation axis=(0 1 0) LinearFunction(coefficients=1 0)
          TransformAxis translation1: coordinates=tibia_tx axis=(1 0 0) LinearFunction(coefficients=1 0)
          TransformAxis translation2: coordinates=tibia_ty axis=(0 1 0) LinearFunction(coefficients=1 0)
          TransformAxis translation3: coordinates=tibia_tz axis=(0 0 1) LinearFunction(coefficients=1 0)
  MarkerSet:
    Marker L.Shank.Upper: tibia_l (-0.00587222 -0.0714473 -0.0796715)
    Marker L.Shank.Front: tibia_l (0.0453065 -0.121584 -0.0308952)
    Marker L.Shank.Rear: tibia_l (-0.0245036 -0.114518 -0.088114)
    Marker L.Ankle.Lat: tibia_l (-0.00362211 -0.42834 -0.0573317)
    Marker L.Ankle.Med: tibia_l (0.0128792 -0.405272 0.0326734)
